R := 660*10^3
C := 1*10^-6
Vac := 310
R*C = 0.66  # c
V(t) := Vac*(1 - e^(-t/(R*C)))
V(0.008) = 3.73489
Given
V(t) == 5
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Find(t) → 33*ln(62)/50 - 33*ln(61)/50 = 0.0107319
________________________________________________________________________
# Номинал конденсатора
Io := 0.005  # A, ток через оптрон
f := 50  # Гц частота сети
X(C1, f) := 1/(2*π*f*C1)
Given
X(cc, f) == Vac/Io
Find(cc) → 5.13403042232e-8 = 5.13403e-8  # Ф
