Vgt := 1  # V
Igt := 0.25  # A
R := 390  # Om
C := 330*10^-9  # F
f := 50  # Hz
I := 230/sqrt(R^2 + (1/(2*π*f*C))^2) = 0.0238252  # А
P := I^2*R = 0.22138  # Wtt,  power dissipation at resistor
C*R^2/5 = 0.0100386  # H, max RL load induction
