CL := 8*10^-12
# F
Cs := 0.1*10^-12  # F, C0
f := 16*10^6  # Hz  # AN2867 "Oscillator design guide for ST microcontrollers"
ESR := 80
Gm := 25*10^-3  # A / V,  see datasheet on MCU
DL := 10*10^-6  # Wtt,  max cristal drive level
IqMCU := 1*10^-3  # A ,  see datasheet on MCU
# ____________________________________________________________________
# Gain
Gmcrit := 4*ESR*(2*π*f)^2*(Cs + CL)^2 = 0.000212187  # A / V
CL1 := 50*10^-12  # F
CL2 := CL1
Gain := Gm/Gmcrit = 117.82  # must be greater > 5
CLs := CL1*CL2/(CL1 + CL2) + Cs = 2.51e-11  # F
# _________________________
# External load cap
CL - Cs = 7.9e-12  # F
Given
CL - Cs == CL1*CL1/(CL1 + CL1)
CL1s := Find(CL1) → 1.58e-11 = 1.58e-11  # F
# _________________________
# Drive level
IqmaxPP := 2*sqrt(2*DL/ESR) = 0.001  # A
IqmaxRMS := IqmaxPP/(2*sqrt(2)) = 0.000353553  # A
DLs := IqMCU^2*ESR = 8e-5  # Wtt
DL/DLs = 0.125
# If DL < DLs need Rext, else Rext = 0:
Rext(Cl) := 1/(2*π*f*Cl)
Rexts := Rext(CL1s) = 629.569
Rextr := 620
# and need recalculation Gain
Gmcrit := 4*(ESR + Rextr)*(2*π*f)^2*(Cs + CL)^2 = 0.00185664  # A / V
Gain := Gm/Gmcrit = 13.4652  # must be greater > 5
