CL := 32*10^-12  # F
Cs := 7*10^-12  # F, C0
f := 8*10^6  # Hz  # AN2867 "Oscillator design guide for ST microcontrollers"
ESR := 80
Gm := 25*10^-3  # A / V,  see datasheet on MCU
DL := 1*10^-3  # Wtt,  max cristal drive level
IqMCU := 1*10^-3  # A ,  see datasheet on MCU
# ____________________________________________________________________
# Gain
Gmcrit := 4*ESR*(2*π*f)^2*(Cs + CL)^2 = 0.00122976  # A / V
CL1 := 50*10^-12  # F
CL2 := CL1
Gain := Gm/Gmcrit = 20.3292  # must be greater > 5
CLs := CL1*CL2/(CL1 + CL2) + Cs = 3.2e-11  # F
# _________________________
# External load cap
CL - Cs = 2.5e-11  # F
Given
CL - Cs == CL1*CL1/(CL1 + CL1)
Find(CL1) → 1/20000000000 = 5e-11  # F
# _________________________
# Drive level
IqmaxPP := 2*sqrt(2*DL/ESR) = 0.01  # A
IqmaxRMS := IqmaxPP/(2*sqrt(2)) = 0.00353553  # A
DLs := IqMCU^2*ESR = 8e-5  # Wtt
DL/DLs = 12.5
# If DL < DLs need Rext, else Rext = 0:
Rext(Cl) := 1/(2*π*f*Cl)
Rexts := Rext(CL2) = 397.887
# and need recalculation Gain
Gmcrit := 4*(ESR + Rexts)*(2*π*f)^2*(Cs + CL)^2 = 0.00734606  # A / V
Gain := Gm/Gmcrit = 3.40318  # must be greater > 5
