CL := 7*10^-12
# F
Cs := 1*10^-12  # F, C0
f := 32768  # Hz  # AN2867 "Oscillator design guide for ST microcontrollers"
ESR := 70*10^3
Gm := 5*10^-6  # A / V,  see datasheet on MCU
DL := 0.1*10^-6  # Wtt,  max cristal drive level
IqMCU := 1.4*10^-6  # A ,  see datasheet on MCU
# ____________________________________________________________________
# Gain
Gmcrit := 4*ESR*(2*π*f)^2*(Cs + CL)^2 = 7.59622e-7  # A / V
CL1 := 50*10^-12  # F
CL2 := CL1
Gain := Gm/Gmcrit = 6.58222  # must be greater > 5
CLs := CL1*CL2/(CL1 + CL2) + Cs = 2.6e-11  # F
# _________________________
# External load cap
CL - Cs = 6e-12  # F
Given
CL - Cs == CL1*CL1/(CL1 + CL1)
CL1s := Find(CL1) → 3/250000000000 = 1.2e-11  # F
# _________________________
# Drive level
IqmaxPP := 2*sqrt(2*DL/ESR) = 3.38062e-6  # A
IqmaxRMS := IqmaxPP/(2*sqrt(2)) = 1.19523e-6  # A
DLs := IqMCU^2*ESR = 1.372e-7  # Wtt
DL/DLs = 0.728863
# If DL < DLs need Rext, else Rext = 0:
Rext(Cl) := 1/(2*π*f*Cl)
Rexts := Rext(CL1s) = 404752
Rextr := 620
# and need recalculation Gain
Gmcrit := 4*(ESR + Rextr)*(2*π*f)^2*(Cs + CL)^2 = 7.6635e-7  # A / V
Gain := Gm/Gmcrit = 6.52443  # must be greater > 5
