R2_min := 490
R2_max := 2000
U := 5  # V
UADCmax := 3.3
# V
ADC := 10  # bit
Tmin := -55  # C
Tmax := 130  # C
OpAmpScale := 2
VADCref := 3.3  # V
deltaT := Tmax - Tmin = 185  # C
deltaUneed := UADCmax/OpAmpScale = 1.65  # V
R1(U2) := U/U2*R2_max - R2_max
U2(R1, R2) := U*R2/(R1 + R2)
deltaU(R1) := U2(R1, R2_max) - U2(R1, R2_min)
Given
deltaU(x) == deltaUneed
R1d := Find(x) → [1370.8973334, 714.860242355]
R1d := 1600  # <-------- !!!
deltaU(R1d) = 1.60553  # V
ADCInUmax := OpAmpScale*deltaU(R1d) = 3.21106  # V
UShiftOpAmp := U2(R1d, R2_min) = 1.17225
U2(R1d, R2_max) = 2.77778
Slope := deltaU(R1d)*OpAmpScale/deltaT = 0.0173571  # V/C  # <-------- !!!
Kvant := VADCref/2^ADC = 0.00322266
KvantPerC := Slope/Kvant = 5.38595
_____________________________
# ShiftOpAmp
R2 := 10000
R1 := U/UShiftOpAmp*R2 - R2 = 32653.1
R1 := 33000  # <-------- !!!
UShiftOpAmpR := U*R2/(R1 + R2) = 1.16279
Error := |UShiftOpAmp - UShiftOpAmpR| = 0.00945811  # V
ErrorKvant := Error/Kvant = 2.93488
ErrorC := 1/(Slope/Error) = 0.544914  # C  # <-------- !!!
_____________________________
TOvertermal := 100  # C
Intercept := -Tmin*Slope = 0.954639
VOvertermal := TOvertermal*Slope + Intercept = 2.69035  # В
Vout(T) := Intercept + T*Slope
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# Overtermal
R2 := 10000
R1 := U/VOvertermal*R2 - R2 = 8584.97
R1 := 8200  # <-------- !!!
VOvertermalR := U*R2/(R1 + R2) = 2.74725
TOvertermalR := (VOvertermalR - Intercept)/Slope = 103.279  # C
